// COMSOL Multiphysics 6.2.0.339 model "slipdepen_streampot.mph"
// Outline of the model tree
// Unit system: none

Parameters
  K = 1  // EDL length inverse
  zetain = 2  // zeta potential
  ur = 0.2  // ratio of up and u
  R = 3.8  // Ionic peclet number
  beta = 0.1  // slip length
  Wi = 1.5  // wissenberg number
  n = 0.5  // index of viscosity

Variables
  var1 "Variables 1"
    Es = (1/(ur*R))*((intop(u*sinh(psi)))/(intop(cosh(psi))))  // streaming potential
    Qs = intop(u)/intop(u2)  // electroviscous effect
    etas = (K*K*ur*ur*Es*Es*R*0.5)*((intop(u*sinh(psi)))/intop(u2))  // electrokinetic efficiency
    zeta = zetain*(1+beta*K*sinh(zetain)/zetain)  // slipdependent zeta

Couplings
  intop1: Integration on domains 1 | opname = intop

Geometry
  geom1 "Geometry 1" (1D, length unit m)
    i1: Interval | coord = 0, 1
    fin: Finalize "Form Union"

Physics
  c: CoefficientFormPDE "poissonpotential" on all domains
    dependent variable psi
    EquationForm.form = Automatic
    cfeq1: CoefficientFormPDE (default) | c = -1; f = K^2 * sinh(psi); da = 0
    zflx1: ZeroFluxBoundary "Zero Flux 1" (default)
    init1: init "Initial Values 1" (default)
    dir1: DirichletBoundary "Dirichlet Boundary Condition 1" on boundaries 2 | r = zeta
  c2: CoefficientFormPDE "momentumns" on all domains
    dependent variable u
    EquationForm.form = Automatic
    cfeq1: CoefficientFormPDE (default) | c = (1 + (Wi^2)*(d(u,x)^2))^((n-1)*0.5); f = 1-K^2*(ur*Es*(sinh(psi))); da = 0
    zflx1: ZeroFluxBoundary "Zero Flux 1" (default)
    init1: init "Initial Values 1" (default)
    dir1: DirichletBoundary "Dirichlet Boundary Condition 1" (disabled) on boundaries 2 | r = 0
    flux1: FluxBoundary "slipbc" on boundaries 2 | q = 1/beta
    dir2: DirichletBoundary "noslip" (disabled) on boundaries 2 | r = 0
  c3: CoefficientFormPDE "pressuredrivenflow" on all domains
    dependent variable u2
    EquationForm.form = Automatic
    cfeq1: CoefficientFormPDE (default) | c = 1; f = 1; da = 0
    zflx1: ZeroFluxBoundary "Zero Flux 1" (default)
    init1: init "Initial Values 1" (default)
    dir1: DirichletBoundary "Dirichlet Boundary Condition 1" (disabled) on boundaries 2 | r = 0
    flux1: FluxBoundary "slipbc" (disabled) on boundaries 2 | q = 1/beta
    dir2: DirichletBoundary "noslip" on boundaries 2 | r = 0

Mesh
  mesh1 "Mesh 1"
    size: MeshSizeDefault | hmax = 0.01; hmin = 2.0E-5; hcurve = 0.2; hauto = 1
    edg1: Edge on remaining entities
    ref1: Refine on entire geometry | numrefine = 3

Studies
  std1 "Study 1"
    param: Parametric "Parametric Sweep"
      pname = beta
      plistarr = 1e-05 1.26485521686e-05 1.59985871961e-05 2.02358964773e-05 2.5595479227e-05 3.23745754282e-05 4.09491506238e-05 5.17947467923e-05 6.5512855686e-05 8.28642772855e-05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
    stat: Stationary

Solver configurations
  sol1 "Solution 1" (study std1)
    v1: Variables "Dependent Variables 1"
    s1: Stationary "Stationary Solver 1"
      dDef: Direct | linsolver = pardiso
      fc1: FullyCoupled | linsolver = dDef; dtech = hnlin; initstep = 0.5; maxiter = 50; ntolfact = 0.5; niter = 1000
      p1: Parametric
        pname = beta
        plistarr = 1e-05 1.26485521686e-05 1.59985871961e-05 2.02358964773e-05 2.5595479227e-05 3.23745754282e-05 4.09491506238e-05 5.17947467923e-05 6.5512855686e-05 8.28642772855e-05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
        pcontinuationmode = no

Datasets
  dset1: Solution | solution = sol1

Plots
  pg1: PlotGroup1D "Coefficient Form PDE" | data = dset1
    lngr1: LineGraph (disabled) on domains 1 | expr = psi; xdata = expr; xdataexpr = x
    lngr2: LineGraph on domains 1 | expr = u
    lngr3: LineGraph (disabled) on domains 1 | expr = u2

Exports
  data1: Data
    data = dset1
    expr = etas
    descr = electrokinetic efficiency
    filename = C:\Users\91771\Desktop\poddarsir\ProfPoddar_royfiles\etaek_compare_new\K1\etaek_zeta2_K1.txt